# Base resistor
# Beregningerne der foretages er worst case
# 30 mA kommer fra den maksimale strøm der kan løbe i højttaler
I_c := 30 mA
h_fe := 40
# Derved kan strømmen der løber ind på base benet beregnes
I_b := I_c/h_fe
I_b = 0.75 mA
# Idet spændingsværdien fra MCU kendes kan størrelsen på modstanden beregnes
V_be := 5 V
V_be_sat := 850 mV
(V_be - V_be_sat)/I_b = 5533.33 Ω
# Der vælges derfor en modstand med værdien 5.6 kΩ
